<?xml version="1.0"?>


<!--


  ****************** IMPORTANT NOTICES **********************

   This is an alpha version release of the DATCOM+ program for
   JSBSIM. Nothing, and I do mean NOTHING, as been checked to
   verify that the parameters, units, sign conventions, or
   basically anything else is correct. Your mileage may vary.

   ***********************************************************

   This file was generated by Datcom+, a superset of
    the USAF Digital DATCOM program.
   This file is considered an intermediary file in the
   DATCOM/JSBSim process. This file may be overwritten without
   warning, so any changes that you make in here may be lost.

   If you intend to use this file as it is and modify it, make
   sure that you take the necessary precautions to prevent it
   from being overwritten, like renaming it.


   ***********************************************************


   DISCLAIMER REQUIRED BY HQ USAF FOR PUBLIC RELEASE APPROVAL

   THIS SOFTWARE AND ANY ACCOMPANYING DOCUMENTATION
   IS RELEASED "AS IS".  THE U.S. GOVERNMENT MAKES NO
   WARRANTY OF ANY KIND, EXPRESS OR IMPLIED, CONCERNING
   THIS SOFTWARE AND ANY ACCOMPANYING DOCUMENTATION,
   INCLUDING, WITHOUT LIMITATION, ANY WARRANTIES OF
   MERCHANTABILITY OR FITNESS FOR A PARTICULAR PURPOSE.
   IN NO EVENT WILL THE U.S. GOVERNMENT BE LIABLE FOR ANY
   DAMAGES, INCLUDING LOST PROFITS, LOST SAVINGS OR OTHER
   INCIDENTAL OR CONSEQUENTIAL DAMAGES ARISING OUT OF THE
   USE, OR INABILITY TO USE, THIS SOFTWARE OR ANY
   ACCOMPANYING DOCUMENTATION, EVEN IF INFORMED IN ADVANCE
   OF THE POSSIBILITY OF SUCH DAMAGES.


   ***********************************************************
-->


<!-- **********************************************************************
        AERODYNAMICS
     **********************************************************************
-->


   <aerodynamics>

      <alphalimits unit="RAD">
         <min>  -.2793    </min>
         <max>   .4189    </max>
      </alphalimits>


      <!-- *************************
                Sign Conventions
           *************************

           Control displacements
                Stick    FWD  + / Aft -
                Stick    Left + / Right -
                Wheel    CCW  + / CW -
                Pedal    Left + / Right -
                Elevator trim Nose Up + / Nose down -

           Surfaces
                Elevator  TED + / TEU -
                R Ail     TED + / TEU -
                L Ail     TED + / TEU -
                Rudder    TEL + / TER -

           F&M, Accel, Rates, Displacements
                Pitch     Up  + / Down -
                Roll      Rgt + / Left -
                Yaw       Rgt + / Left -

           Other
                Alpha     Up  + / Down -
                Beta Wind in right ear + / Wind in left ear -
                Slip Ball right of center + / left of center -
      -->


      <!-- **************************************
                ASSUMPTIONS AND LIMITATIONS

           There is no interaction between deflected surfaces modeled
           so there is no change in elevator effects with the flaps
           deflected, for example.

           Terms known to be missing from DATCOM:
              Power effects
              Ground effects
              Cyr, CyDr, Cyda, ClDr, Cndr

           **************************************
      -->


      <!--
           The following ground effect tables are NOT generated
           by DATCOM, but provide representative effects.
           These terms are not currently used in this model.
      -->


      <function name="aero/function/ground-effect-factor-lift">
         <description>Change in lift due to ground effect factor</description>
         <product>
            <table>
               <independentVar lookup="row">aero/h_b-mac-ft</independentVar>
               <tableData>
                  0.0  1.203
                  0.1  1.127
                  0.15 1.090
                  0.2  1.073
                  0.3  1.046
                  0.4  1.055
                  0.5  1.019
                  0.6  1.013
                  0.7  1.008
                  0.8  1.006
                  0.9  1.003
                  1.0  1.002
                  1.1  1.0
               </tableData>
            </table>
         </product>
      </function>

      <function name="aero/function/ground-effect-factor-drag">
         <description>Change in drag due to ground effect</description>
         <product>
            <table>
               <independentVar lookup="row">aero/h_b-mac-ft</independentVar>
               <tableData>
                  0.0  0.480
                  0.1  0.515
                  0.15 0.629
                  0.2  0.709
                  0.3  0.815
                  0.4  0.882
                  0.5  0.928
                  0.6  0.962
                  0.7  0.988
                  0.8  1.0
                  0.9  1.0
                  1.0  1.0
                  1.1  1.0
               </tableData>
            </table>
         </product>
      </function>


<!-- ********************************************************************** -->


     <axis name="LIFT">


         <function name="aero/coefficient/CLwbh">
            <description>
               Lift due to alpha
               Increase in CL decreases Period and damping,Dutch Roll damping
               CL is low for landing
            </description>
            <product>
               <property>aero/function/ground-effect-factor-lift</property>
               <property>aero/qbar-psf</property>
               <property>metrics/Sw-sqft</property>
               <table>
                  <independentVar lookup="row">aero/alpha-rad</independentVar>
                  <tableData>
                       -.2793        -1.132
                       -.1745        -.5004
                       -.1396        -.3096
                       -.1047        -.1217
                       -.6981E-01     .6791E-01
                       -.3491E-01     .2649
                         .000         .4688
                        .3491E-01     .6791
                        .6981E-01     .8949
                        .1396         1.323
                        .1745         1.493
                        .2094         1.632
                        .2443         1.734
                        .2618         1.772
                        .2793         1.783
                        .2967         1.762
                        .3142         1.692
                        .3491         1.086
                        .3840         .5449
                        .4189         .5983E-01
                  </tableData>
               </table>
            </product>
         </function>

         <function name="aero/coefficient/CLq">
            <description>
               Basic Lift Coefficient due to pitch rate(per radian)
            </description>
            <product>
               <property>velocities/q-aero-rad_sec</property>
               <property>aero/qbar-psf</property>
               <property>metrics/Sw-sqft</property>
               <property>aero/ci2vel</property>
               <table>
                  <independentVar lookup="row">aero/alpha-rad</independentVar>
                  <tableData>
                       -.2793         5.711
                       -.1745         5.711
                       -.1396         5.711
                       -.1047         5.711
                       -.6981E-01     5.711
                       -.3491E-01     5.711
                         .000         5.711
                        .3491E-01     5.711
                        .6981E-01     5.711
                        .1396         5.711
                        .1745         5.711
                        .2094         5.711
                        .2443         5.711
                        .2618         5.711
                        .2793         5.711
                        .2967         5.711
                        .3142         5.711
                        .3491         5.711
                        .3840         5.711
                        .4189         5.711
                  </tableData>
               </table>
            </product>
         </function>

         <function name="aero/coefficient/CLad">
            <description>
               Basic Lift Coefficient due to AOA rate(per radian)
               Important contributor to Short-Period damping
               For low Cla, aircraft must land at high alpha
            </description>
            <product>
               <property>aero/alphadot-rad_sec</property>
               <property>aero/qbar-psf</property>
               <property>metrics/Sw-sqft</property>
               <property>aero/ci2vel</property>
               <table>
                  <independentVar lookup="row">aero/alpha-rad</independentVar>
                  <tableData>
                       -.2793         2.319
                       -.1745         2.185
                       -.1396         2.333
                       -.1047         2.334
                       -.6981E-01     2.312
                       -.3491E-01     2.318
                         .000         2.293
                        .3491E-01     2.248
                        .6981E-01     2.141
                        .1396         1.624
                        .1745         1.188
                        .2094         .8298
                        .2443         .3411
                        .2618        -.4689E-01
                        .2793        -.6782
                        .2967        -1.677
                        .3142        -2.990
                        .3491        -4.304
                        .3840        -3.993
                        .4189        -3.878
                  </tableData>
               </table>
            </product>
         </function>

         <function name="aero/coefficient/CLdF1L">
            <description>
               Lift Coefficient due to Left Plain Flaps Deflection
               Positive surface deflection is trailing edge down
               Ultimately, we will feed this left flap pos
            </description>
            <product>
               <property>aero/qbar-psf</property>
               <property>metrics/Sw-sqft</property>
               <table>
                  <independentVar lookup="row">fcs/flap-pos-deg</independentVar>
                  <tableData>
                         .000          .000
                        5.000         .3350E-01
                        15.00         .9825E-01
                        25.00         .1213
                        35.00         .1436
                  </tableData>
               </table>
            </product>
         </function>

         <function name="aero/coefficient/CLdF1R">
            <description>
               Lift Coefficient due to Right Plain Flaps Deflection
               Positive surface deflection is trailing edge down
               Ultimately, we will feed this right flap pos
            </description>
            <product>
               <property>aero/qbar-psf</property>
               <property>metrics/Sw-sqft</property>
               <table>
                  <independentVar lookup="row">fcs/flap-pos-deg</independentVar>
                  <tableData>
                         .000          .000
                        5.000         .3350E-01
                        15.00         .9825E-01
                        25.00         .1213
                        35.00         .1436
                  </tableData>
               </table>
            </product>
         </function>

         <function name="aero/coefficient/CLdF11L">
            <description>
               Lift Coefficient due to Left Plain Flaps Deflection
               Positive surface deflection is trailing edge down
               Ultimately, we will feed this left flap pos
            </description>
            <product>
               <property>aero/qbar-psf</property>
               <property>metrics/Sw-sqft</property>
               <table>
                  <independentVar lookup="row">fcs/flap-pos-deg</independentVar>
                  <tableData>
                       -20.00         .5224E-01
                       -15.00         .4442E-01
                       -10.00         .3028E-01
                       -5.000         .1514E-01
                         .000          .000
                        5.000        -.1514E-01
                        10.00        -.3028E-01
                        15.00        -.4442E-01
                        20.00        -.5224E-01
                  </tableData>
               </table>
            </product>
         </function>

         <function name="aero/coefficient/CLdF11R">
            <description>
               Lift Coefficient due to Right Plain Flaps Deflection
               Positive surface deflection is trailing edge down
               Ultimately, we will feed this right flap pos
            </description>
            <product>
               <property>aero/qbar-psf</property>
               <property>metrics/Sw-sqft</property>
               <table>
                  <independentVar lookup="row">fcs/flap-pos-deg</independentVar>
                  <tableData>
                       -20.00         .5224E-01
                       -15.00         .4442E-01
                       -10.00         .3028E-01
                       -5.000         .1514E-01
                         .000          .000
                        5.000        -.1514E-01
                        10.00        -.3028E-01
                        15.00        -.4442E-01
                        20.00        -.5224E-01
                  </tableData>
               </table>
            </product>
         </function>

         <function name="aero/coefficient/CLDe">
            <description>
               Lift Coefficient due to Elevator Deflection
               Positive surface deflection is trailing edge down
            </description>
            <product>
               <property>aero/qbar-psf</property>
               <property>metrics/Sw-sqft</property>
               <table>
                  <independentVar lookup="row">fcs/elevator-pos-rad</independentVar>
                  <tableData>
                       -.3491        -.1045
                       -.2618        -.8883E-01
                       -.1745        -.6056E-01
                       -.8727E-01    -.3028E-01
                         .000         .6056E-04
                        .8727E-01     .3028E-01
                        .1745         .6056E-01
                        .2618         .8883E-01
                        .3491         .1045
                  </tableData>
               </table>
            </product>
         </function>

     </axis>


<!-- ********************************************************************** -->


     <axis name="DRAG">


         <function name="aero/coefficient/CD">
            <description>
               Basic Drag Coefficient
               Sense: Always positive
               Main contributor to Phugoid damping: Greater Cd, Better damping
            </description>
            <product>
               <property>aero/function/ground-effect-factor-lift</property>
               <property>aero/qbar-psf</property>
               <property>metrics/Sw-sqft</property>
               <table>
                  <independentVar lookup="row">aero/alpha-rad</independentVar>
                  <tableData>
                       -.2793         .9635E-01
                       -.1745         .3812E-01
                       -.1396         .2906E-01
                       -.1047         .2354E-01
                       -.6981E-01     .2199E-01
                       -.3491E-01     .2457E-01
                         .000         .3178E-01
                        .3491E-01     .4384E-01
                        .6981E-01     .6098E-01
                        .1396         .1090
                        .1745         .1323
                        .2094         .1542
                        .2443         .1724
                        .2618         .1797
                        .2793         .1819
                        .2967         .1794
                        .3142         .1690
                        .3491         .1049
                        .3840         .9128E-01
                        .4189         .1018
                  </tableData>
               </table>
            </product>
         </function>

         <function name="aero/coefficient/CdDf1L">
            <description>
               Drag Coefficient due to Left Plain Flaps Deflection
               Positive surface deflection is trailing edge down
               Ultimately, we will feed this left flap pos
            </description>
            <product>
               <property>aero/qbar-psf</property>
               <property>metrics/Sw-sqft</property>
               <table>
                  <independentVar lookup="row">aero/alpha-deg</independentVar>
                  <independentVar lookup="column">fcs/flap-pos-deg</independentVar>
                  <tableData>
                                       .000         5.000         15.00         25.00         35.00
                       -16.00          .000        -.3170E-02    -.8287E-02    -.9786E-02    -.1108E-01
                       -10.00          .000        -.1482E-02    -.3335E-02    -.3673E-02    -.3840E-02
                       -8.000          .000        -.9190E-03    -.1685E-02    -.1636E-02    -.1427E-02
                       -6.000          .000        -.3562E-03    -.3385E-04     .4021E-03     .9848E-03
                       -4.000          .000         .2066E-03     .1617E-02     .2440E-02     .3397E-02
                       -2.000          .000         .7694E-03     .3267E-02     .4477E-02     .5809E-02
                         .000          .000         .1332E-02     .4918E-02     .6515E-02     .8222E-02
                        2.000          .000         .1895E-02     .6569E-02     .8553E-02     .1063E-01
                        4.000          .000         .2458E-02     .8219E-02     .1059E-01     .1305E-01
                        8.000          .000         .3584E-02     .1152E-01     .1467E-01     .1787E-01
                        10.00          .000         .4146E-02     .1317E-01     .1670E-01     .2028E-01
                        12.00          .000         .4709E-02     .1482E-01     .1874E-01     .2270E-01
                        14.00          .000         .5272E-02     .1647E-01     .2078E-01     .2511E-01
                        15.00          .000         .5553E-02     .1730E-01     .2180E-01     .2631E-01
                        16.00          .000         .5835E-02     .1812E-01     .2282E-01     .2752E-01
                        17.00          .000         .6116E-02     .1895E-01     .2383E-01     .2873E-01
                        18.00          .000         .6398E-02     .1977E-01     .2485E-01     .2993E-01
                        20.00          .000         .6960E-02     .2142E-01     .2689E-01     .3234E-01
                        22.00          .000         .7523E-02     .2308E-01     .2893E-01     .3476E-01
                        24.00          .000         .8086E-02     .2473E-01     .3097E-01     .3717E-01
                  </tableData>
               </table>
            </product>
         </function>

         <function name="aero/coefficient/CdDf1R">
            <description>
               Drag Coefficient due to Right Plain Flaps Deflection
               Positive surface deflection is trailing edge down
               Ultimately, we will feed this right flap pos
            </description>
            <product>
               <property>aero/qbar-psf</property>
               <property>metrics/Sw-sqft</property>
               <table>
                  <independentVar lookup="row">aero/alpha-deg</independentVar>
                  <independentVar lookup="column">fcs/flap-pos-deg</independentVar>
                  <tableData>
                                       .000         5.000         15.00         25.00         35.00
                       -16.00          .000        -.3170E-02    -.8287E-02    -.9786E-02    -.1108E-01
                       -10.00          .000        -.1482E-02    -.3335E-02    -.3673E-02    -.3840E-02
                       -8.000          .000        -.9190E-03    -.1685E-02    -.1636E-02    -.1427E-02
                       -6.000          .000        -.3562E-03    -.3385E-04     .4021E-03     .9848E-03
                       -4.000          .000         .2066E-03     .1617E-02     .2440E-02     .3397E-02
                       -2.000          .000         .7694E-03     .3267E-02     .4477E-02     .5809E-02
                         .000          .000         .1332E-02     .4918E-02     .6515E-02     .8222E-02
                        2.000          .000         .1895E-02     .6569E-02     .8553E-02     .1063E-01
                        4.000          .000         .2458E-02     .8219E-02     .1059E-01     .1305E-01
                        8.000          .000         .3584E-02     .1152E-01     .1467E-01     .1787E-01
                        10.00          .000         .4146E-02     .1317E-01     .1670E-01     .2028E-01
                        12.00          .000         .4709E-02     .1482E-01     .1874E-01     .2270E-01
                        14.00          .000         .5272E-02     .1647E-01     .2078E-01     .2511E-01
                        15.00          .000         .5553E-02     .1730E-01     .2180E-01     .2631E-01
                        16.00          .000         .5835E-02     .1812E-01     .2282E-01     .2752E-01
                        17.00          .000         .6116E-02     .1895E-01     .2383E-01     .2873E-01
                        18.00          .000         .6398E-02     .1977E-01     .2485E-01     .2993E-01
                        20.00          .000         .6960E-02     .2142E-01     .2689E-01     .3234E-01
                        22.00          .000         .7523E-02     .2308E-01     .2893E-01     .3476E-01
                        24.00          .000         .8086E-02     .2473E-01     .3097E-01     .3717E-01
                  </tableData>
               </table>
            </product>
         </function>

         <function name="aero/coefficient/CdDf11L">
            <description>
               Drag Coefficient due to Left Plain Flaps Deflection
               Positive surface deflection is trailing edge down
               Ultimately, we will feed this left flap pos
            </description>
            <product>
               <property>aero/qbar-psf</property>
               <property>metrics/Sw-sqft</property>
               <table>
                  <independentVar lookup="row">aero/alpha-deg</independentVar>
                  <independentVar lookup="column">fcs/flap-pos-deg</independentVar>
                  <tableData>
                                     -20.00        -15.00        -10.00        -5.000          .000         5.000         10.00         15.00         20.00
                       -16.00         .4813E-02     .3835E-02     .2298E-02     .9794E-03      .000        -.6404E-03    -.9419E-03    -.9174E-03    -.7767E-03
                       -10.00         .3642E-02     .2839E-02     .1619E-02     .6399E-03      .000        -.3009E-03    -.2629E-03     .7859E-04     .3948E-03
                       -8.000         .3267E-02     .2521E-02     .1402E-02     .5314E-03      .000        -.1924E-03    -.4595E-04     .3969E-03     .7693E-03
                       -6.000         .2885E-02     .2196E-02     .1180E-02     .4207E-03      .000        -.8173E-04     .1755E-03     .7217E-03     .1151E-02
                       -4.000         .2492E-02     .1861E-02     .9524E-03     .3067E-03      .000         .3223E-04     .4034E-03     .1056E-02     .1545E-02
                       -2.000         .2101E-02     .1529E-02     .7256E-03     .1933E-03      .000         .1456E-03     .6301E-03     .1389E-02     .1936E-02
                         .000         .1710E-02     .1197E-02     .4991E-03     .8009E-04      .000         .2589E-03     .8566E-03     .1721E-02     .2327E-02
                        2.000         .1308E-02     .8549E-03     .2663E-03    -.3634E-04      .000         .3753E-03     .1090E-02     .2063E-02     .2728E-02
                        4.000         .8977E-03     .5061E-03     .2851E-04    -.1552E-03      .000         .4942E-03     .1327E-02     .2411E-02     .3139E-02
                        8.000        -.3454E-04    -.2864E-03    -.5118E-03    -.4254E-03      .000         .7643E-03     .1868E-02     .3204E-02     .4071E-02
                        10.00        -.6106E-03    -.7762E-03    -.8456E-03    -.5923E-03      .000         .9312E-03     .2201E-02     .3694E-02     .4647E-02
                        12.00        -.1300E-02    -.1362E-02    -.1245E-02    -.7920E-03      .000         .1131E-02     .2601E-02     .4280E-02     .5336E-02
                        14.00        -.2029E-02    -.1982E-02    -.1668E-02    -.1003E-02      .000         .1342E-02     .3024E-02     .4900E-02     .6066E-02
                        15.00        -.2457E-02    -.2346E-02    -.1916E-02    -.1127E-02      .000         .1466E-02     .3272E-02     .5264E-02     .6494E-02
                        16.00        -.2926E-02    -.2745E-02    -.2188E-02    -.1263E-02      .000         .1602E-02     .3543E-02     .5662E-02     .6962E-02
                        17.00        -.3489E-02    -.3223E-02    -.2514E-02    -.1426E-02      .000         .1765E-02     .3870E-02     .6141E-02     .7526E-02
                        18.00        -.4172E-02    -.3804E-02    -.2909E-02    -.1624E-02      .000         .1963E-02     .4265E-02     .6721E-02     .8208E-02
                        20.00        -.6021E-02    -.5376E-02    -.3981E-02    -.2160E-02      .000         .2499E-02     .5337E-02     .8293E-02     .1006E-01
                        22.00        -.7786E-02    -.6877E-02    -.5004E-02    -.2672E-02      .000         .3011E-02     .6360E-02     .9794E-02     .1182E-01
                        24.00        -.9503E-02    -.8336E-02    -.5999E-02    -.3169E-02      .000         .3508E-02     .7355E-02     .1125E-01     .1354E-01
                  </tableData>
               </table>
            </product>
         </function>

         <function name="aero/coefficient/CdDf11R">
            <description>
               Drag Coefficient due to Right Plain Flaps Deflection
               Positive surface deflection is trailing edge down
               Ultimately, we will feed this right flap pos
            </description>
            <product>
               <property>aero/qbar-psf</property>
               <property>metrics/Sw-sqft</property>
               <table>
                  <independentVar lookup="row">aero/alpha-deg</independentVar>
                  <independentVar lookup="column">fcs/flap-pos-deg</independentVar>
                  <tableData>
                                     -20.00        -15.00        -10.00        -5.000          .000         5.000         10.00         15.00         20.00
                       -16.00         .4813E-02     .3835E-02     .2298E-02     .9794E-03      .000        -.6404E-03    -.9419E-03    -.9174E-03    -.7767E-03
                       -10.00         .3642E-02     .2839E-02     .1619E-02     .6399E-03      .000        -.3009E-03    -.2629E-03     .7859E-04     .3948E-03
                       -8.000         .3267E-02     .2521E-02     .1402E-02     .5314E-03      .000        -.1924E-03    -.4595E-04     .3969E-03     .7693E-03
                       -6.000         .2885E-02     .2196E-02     .1180E-02     .4207E-03      .000        -.8173E-04     .1755E-03     .7217E-03     .1151E-02
                       -4.000         .2492E-02     .1861E-02     .9524E-03     .3067E-03      .000         .3223E-04     .4034E-03     .1056E-02     .1545E-02
                       -2.000         .2101E-02     .1529E-02     .7256E-03     .1933E-03      .000         .1456E-03     .6301E-03     .1389E-02     .1936E-02
                         .000         .1710E-02     .1197E-02     .4991E-03     .8009E-04      .000         .2589E-03     .8566E-03     .1721E-02     .2327E-02
                        2.000         .1308E-02     .8549E-03     .2663E-03    -.3634E-04      .000         .3753E-03     .1090E-02     .2063E-02     .2728E-02
                        4.000         .8977E-03     .5061E-03     .2851E-04    -.1552E-03      .000         .4942E-03     .1327E-02     .2411E-02     .3139E-02
                        8.000        -.3454E-04    -.2864E-03    -.5118E-03    -.4254E-03      .000         .7643E-03     .1868E-02     .3204E-02     .4071E-02
                        10.00        -.6106E-03    -.7762E-03    -.8456E-03    -.5923E-03      .000         .9312E-03     .2201E-02     .3694E-02     .4647E-02
                        12.00        -.1300E-02    -.1362E-02    -.1245E-02    -.7920E-03      .000         .1131E-02     .2601E-02     .4280E-02     .5336E-02
                        14.00        -.2029E-02    -.1982E-02    -.1668E-02    -.1003E-02      .000         .1342E-02     .3024E-02     .4900E-02     .6066E-02
                        15.00        -.2457E-02    -.2346E-02    -.1916E-02    -.1127E-02      .000         .1466E-02     .3272E-02     .5264E-02     .6494E-02
                        16.00        -.2926E-02    -.2745E-02    -.2188E-02    -.1263E-02      .000         .1602E-02     .3543E-02     .5662E-02     .6962E-02
                        17.00        -.3489E-02    -.3223E-02    -.2514E-02    -.1426E-02      .000         .1765E-02     .3870E-02     .6141E-02     .7526E-02
                        18.00        -.4172E-02    -.3804E-02    -.2909E-02    -.1624E-02      .000         .1963E-02     .4265E-02     .6721E-02     .8208E-02
                        20.00        -.6021E-02    -.5376E-02    -.3981E-02    -.2160E-02      .000         .2499E-02     .5337E-02     .8293E-02     .1006E-01
                        22.00        -.7786E-02    -.6877E-02    -.5004E-02    -.2672E-02      .000         .3011E-02     .6360E-02     .9794E-02     .1182E-01
                        24.00        -.9503E-02    -.8336E-02    -.5999E-02    -.3169E-02      .000         .3508E-02     .7355E-02     .1125E-01     .1354E-01
                  </tableData>
               </table>
            </product>
         </function>

         <function name="aero/coefficient/CdDe">
            <description>
               Drag Coefficient due to Elevator Deflection
               Positive surface deflection is trailing edge down
            </description>
            <product>
               <property>aero/qbar-psf</property>
               <property>metrics/Sw-sqft</property>
               <table>
                  <independentVar lookup="row">aero/alpha-rad</independentVar>
                  <independentVar lookup="column">fcs/elevator-pos-rad</independentVar>
                  <tableData>
                                     -.3491        -.2618        -.1745        -.8727E-01      .000         .8727E-01     .1745         .2618         .3491
                       -.2793         .9626E-02     .7670E-02     .4595E-02     .1959E-02    -.3239E-05    -.1281E-02    -.1884E-02    -.1835E-02    -.1553E-02
                       -.1745         .7283E-02     .5678E-02     .3237E-02     .1280E-02    -.1880E-05    -.6019E-03    -.5259E-03     .1572E-03     .7897E-03
                       -.1396         .6534E-02     .5041E-02     .2803E-02     .1063E-02    -.1446E-05    -.3849E-03    -.9190E-04     .7938E-03     .1539E-02
                       -.1047         .5770E-02     .4391E-02     .2361E-02     .8413E-03    -.1003E-05    -.1635E-03     .3510E-03     .1443E-02     .2303E-02
                       -.6981E-01     .4984E-02     .3723E-02     .1905E-02     .6134E-03    -.5476E-06     .6446E-04     .8068E-03     .2112E-02     .3089E-02
                       -.3491E-01     .4201E-02     .3058E-02     .1451E-02     .3867E-03    -.9413E-07     .2912E-03     .1260E-02     .2777E-02     .3872E-02
                         .000         .3420E-02     .2393E-02     .9983E-03     .1602E-03     .3589E-06     .5177E-03     .1713E-02     .3442E-02     .4653E-02
                        .3491E-01     .2616E-02     .1710E-02     .5325E-03    -.7268E-04     .8246E-06     .7506E-03     .2179E-02     .4125E-02     .5457E-02
                        .6981E-01     .1795E-02     .1012E-02     .5702E-04    -.3104E-03     .1300E-05     .9883E-03     .2655E-02     .4823E-02     .6277E-02
                        .1396        -.6908E-04    -.5729E-03    -.1024E-02    -.8507E-03     .2381E-05     .1529E-02     .3735E-02     .6408E-02     .8142E-02
                        .1745        -.1221E-02    -.1552E-02    -.1691E-02    -.1185E-02     .3048E-05     .1862E-02     .4403E-02     .7387E-02     .9294E-02
                        .2094        -.2600E-02    -.2724E-02    -.2490E-02    -.1584E-02     .3847E-05     .2262E-02     .5202E-02     .8559E-02     .1067E-01
                        .2443        -.4058E-02    -.3965E-02    -.3336E-02    -.2007E-02     .4692E-05     .2685E-02     .6047E-02     .9799E-02     .1213E-01
                        .2618        -.4915E-02    -.4692E-02    -.3832E-02    -.2255E-02     .5189E-05     .2933E-02     .6543E-02     .1053E-01     .1299E-01
                        .2793        -.5852E-02    -.5489E-02    -.4375E-02    -.2527E-02     .5733E-05     .3204E-02     .7087E-02     .1132E-01     .1392E-01
                        .2967        -.6978E-02    -.6447E-02    -.5028E-02    -.2853E-02     .6381E-05     .3531E-02     .7739E-02     .1228E-01     .1505E-01
                        .3142        -.8343E-02    -.7607E-02    -.5819E-02    -.3248E-02     .7178E-05     .3926E-02     .8530E-02     .1344E-01     .1642E-01
                        .3491        -.1204E-01    -.1075E-01    -.7963E-02    -.4320E-02     .9326E-05     .4998E-02     .1067E-01     .1659E-01     .2011E-01
                        .3840        -.1557E-01    -.1375E-01    -.1001E-01    -.5343E-02     .1137E-04     .6021E-02     .1272E-01     .1959E-01     .2365E-01
                        .4189        -.1901E-01    -.1667E-01    -.1200E-01    -.6338E-02     .1336E-04     .7016E-02     .1471E-01     .2251E-01     .2708E-01
                  </tableData>
               </table>
            </product>
         </function>

     </axis>


<!-- ********************************************************************** -->


     <axis name="SIDE">


         <function name="aero/coefficient/Cyb">
            <description>
               Side Force coefficient due to Sideslip(per radian)
                Contributes to damping of Dutch Roll mode
            </description>
            <product>
               <property>aero/qbar-psf</property>
               <property>metrics/Sw-sqft</property>
               <sin><property>aero/beta-rad</property></sin>
               <table>
                  <independentVar lookup="row">aero/alpha-rad</independentVar>
                  <tableData>
                       -.2793        -.5344
                       -.1745        -.5344
                       -.1396        -.5344
                       -.1047        -.5344
                       -.6981E-01    -.5344
                       -.3491E-01    -.5344
                         .000        -.5344
                        .3491E-01    -.5344
                        .6981E-01    -.5344
                        .1396        -.5344
                        .1745        -.5344
                        .2094        -.5344
                        .2443        -.5344
                        .2618        -.5344
                        .2793        -.5344
                        .2967        -.5344
                        .3142        -.5344
                        .3491        -.5344
                        .3840        -.5344
                        .4189        -.5344
                  </tableData>
               </table>
            </product>
         </function>

         <function name="aero/coefficient/Cyp">
            <description>
               Side Force Coefficient due to Roll Rate(per radian)
            </description>
            <product>
               <property>velocities/p-aero-rad_sec</property>
               <property>aero/qbar-psf</property>
               <property>metrics/Sw-sqft</property>
               <property>aero/bi2vel</property>
               <table>
                  <independentVar lookup="row">aero/alpha-rad</independentVar>
                  <tableData>
                       -.2793        -.9358E-01
                       -.1745        -.6213E-01
                       -.1396        -.5178E-01
                       -.1047        -.4155E-01
                       -.6981E-01    -.3125E-01
                       -.3491E-01    -.2077E-01
                         .000        -.1014E-01
                        .3491E-01     .6171E-03
                        .6981E-01     .1153E-01
                        .1396         .3406E-01
                        .1745         .4455E-01
                        .2094         .5454E-01
                        .2443         .6394E-01
                        .2618         .6952E-01
                        .2793         .7738E-01
                        .2967         .1223
                        .3142         .6219E-01
                        .3491         .5588E-01
                        .3840         .4761E-01
                        .4189         .3912E-01
                  </tableData>
               </table>
            </product>
         </function>


         <!-- *************************
              Not calculated by DATCOM+
              *************************
         -->

         <function name="aero/coefficient/Cyr">
            <description>
               Side Force due to Yaw Rate(DATCOM does not calculate)
               Effect is small
            </description>
            <product>
               <property>velocities/r-aero-rad_sec</property>
               <property>aero/qbar-psf</property>
               <property>metrics/Sw-sqft</property>
               <property>aero/bi2vel</property>
               <value>    .000    </value>
            </product>
         </function>


         <!-- *************************
              Not calculated by DATCOM+
              *************************
         -->

         <function name="aero/coefficient/CyDr">
            <description>
               Side Force due to rudder(DATCOM does not calculate)
            </description>
            <product>
               <property>aero/qbar-psf</property>
               <property>metrics/Sw-sqft</property>
               <property>fcs/rudder-pos-rad</property>
               <value>    .000    </value>
            </product>
         </function>


         <!-- *************************
              Not calculated by DATCOM+
              *************************
         -->

         <function name="aero/coefficient/CyDa">
            <description>
               Side Force due to aileron(DATCOM does not calculate)
               Usually neglected
            </description>
            <product>
               <property>aero/qbar-psf</property>
               <property>metrics/Sw-sqft</property>
               <property>metrics/Sw-sqft</property>
               <property>fcs/left-aileron-pos-rad</property>
               <value>    .000    </value>
            </product>
         </function>

     </axis>


<!-- ********************************************************************** -->


     <axis name="ROLL">


         <function name="aero/coefficient/Clb">
            <description>
               Roll Moment coefficient due to Beta(per radian)
               Decrease of Clb to small negative value improves Dutch Roll Damping
               High Positive value leads to excessive spiral instability
            </description>
            <product>
               <property>aero/qbar-psf</property>
               <property>metrics/Sw-sqft</property>
               <property>metrics/bw-ft</property>
               <sin><property>aero/beta-rad</property></sin>
               <table>
                  <independentVar lookup="row">aero/alpha-rad</independentVar>
                  <tableData>
                       -.2793        -.1002E-01
                       -.1745        -.4349E-01
                       -.1396        -.5408E-01
                       -.1047        -.6405E-01
                       -.6981E-01    -.7396E-01
                       -.3491E-01    -.8434E-01
                         .000        -.9515E-01
                        .3491E-01    -.1064
                        .6981E-01    -.1181
                        .1396        -.1412
                        .1745        -.1495
                        .2094        -.1554
                        .2443        -.1587
                        .2618        -.1593
                        .2793        -.1578
                        .2967        -.1539
                        .3142        -.1464
                        .3491        -.9833E-01
                        .3840        -.5603E-01
                        .4189        -.1851E-01
                  </tableData>
               </table>
            </product>
         </function>

         <function name="aero/coefficient/Clp">
            <description>
               Roll Moment coefficient due to roll rate(per radian)
               Clp alone determines damping-in-roll characteristics
            </description>
            <product>
               <property>aero/qbar-psf</property>
               <property>metrics/Sw-sqft</property>
               <property>metrics/bw-ft</property>
               <property>aero/bi2vel</property>
               <property>velocities/p-aero-rad_sec</property>
               <table>
                  <independentVar lookup="row">aero/alpha-rad</independentVar>
                  <tableData>
                       -.2793        -.5247
                       -.1745        -.4834
                       -.1396        -.4663
                       -.1047        -.4582
                       -.6981E-01    -.4728
                       -.3491E-01    -.4958
                         .000        -.5150
                        .3491E-01    -.5303
                        .6981E-01    -.5335
                        .1396        -.4287
                        .1745        -.3354
                        .2094        -.2382
                        .2443        -.1245
                        .2618        -.3765E-02
                        .2793         .1807
                        .2967         .4417
                        .3142         1.072
                        .3491         1.762
                        .3840         1.437
                        .4189         1.270
                  </tableData>
               </table>
            </product>
         </function>

         <function name="aero/coefficient/Clr">
            <description>
               Roll Moment coefficient due to yaw rate(per radian)
               Considerable effect on Spiral mode. Large
               positive values leads to strong sprial instability
            </description>
            <product>
               <property>aero/qbar-psf</property>
               <property>metrics/Sw-sqft</property>
               <property>metrics/bw-ft</property>
               <property>aero/bi2vel</property>
               <property>velocities/r-aero-rad_sec</property>
               <table>
                  <independentVar lookup="row">aero/alpha-rad</independentVar>
                  <tableData>
                       -.2793          .000
                       -.1745          .000
                       -.1396          .000
                       -.1047          .000
                       -.6981E-01      .000
                       -.3491E-01      .000
                         .000          .000
                        .3491E-01      .000
                        .6981E-01      .000
                        .1396          .000
                        .1745          .000
                        .2094          .000
                        .2443          .000
                        .2618          .000
                        .2793          .000
                        .2967          .000
                        .3142          .000
                        .3491          .000
                        .3840          .000
                        .4189          .000
                  </tableData>
               </table>
            </product>
         </function>

         <function name="aero/coefficient/ClDs4">
            <description>
               Roll Moment coefficient due to Left Double Slotted Flaps Deflection
            </description>
            <product>
               <property>aero/qbar-psf</property>
               <property>metrics/Sw-sqft</property>
               <property>metrics/bw-ft</property>
               <table>
                  <independentVar lookup="row">fcs/left-aileron-pos-rad</independentVar>
                  <tableData>
                       -.6458        -.3386E-01
                       -.4014        -.2507E-01
                       -.1571        -.9948E-02
                       -.7854E-01    -.4974E-02
                         .000          .000
                        .7854E-01     .4974E-02
                        .1571         .9948E-02
                        .4014         .2507E-01
                        .6458         .3386E-01
                  </tableData>
               </table>
            </product>
         </function>

         <function name="aero/coefficient/CldF1">
            <description>
               Roll Moment Coefficient due to Asymetrical Plain Flaps Deflection
               calculated as difference between left and right flap lift coef,
               times distance from centerline to MAC of surface.
            </description>
            <product>
               <value>      5.77</value>
               <difference>
                  <property>aero/coefficient/CLdF1R</property>
                  <property>aero/coefficient/CLdF1L</property>
               </difference>
            </product>
         </function>

         <function name="aero/coefficient/CldF11">
            <description>
               Roll Moment Coefficient due to Asymetrical Plain Flaps Deflection
               calculated as difference between left and right flap lift coef,
               times distance from centerline to MAC of surface.
            </description>
            <product>
               <value>      1.24</value>
               <difference>
                  <property>aero/coefficient/CLdF11R</property>
                  <property>aero/coefficient/CLdF11L</property>
               </difference>
            </product>
         </function>


         <!-- *************************
              Not calculated by DATCOM+
              *************************
         -->

         <function name="aero/coefficient/ClDr">
            <description>
               Roll moment due to rudder(DATCOM does not calculate)
               Usually insignificant in dynamic stability considerations
               but is used in autopilot work
            </description>
            <product>
               <property>metrics/bw-ft</property>
               <property>aero/qbar-psf</property>
               <property>metrics/Sw-sqft</property>
               <property>fcs/rudder-pos-rad</property>
               <value>    .000    </value>
            </product>
         </function>

     </axis>


<!-- ********************************************************************** -->


     <axis name="PITCH">


         <function name="aero/coefficient/Cm_basic">
            <description>
               Basic_Pitch_moment_coefficient
            </description>
            <product>
               <property>aero/qbar-psf</property>
               <property>metrics/Sw-sqft</property>
               <property>metrics/cbarw-ft</property>
               <table>
                  <independentVar lookup="row">aero/alpha-rad</independentVar>
                  <tableData>
                       -.2793         .2701
                       -.1745         .1745
                       -.1396         .1735
                       -.1047         .1570
                       -.6981E-01     .1369
                       -.3491E-01     .1186
                         .000         .1028
                        .3491E-01     .8738E-01
                        .6981E-01     .7249E-01
                        .1396         .3457E-01
                        .1745         .2056E-02
                        .2094        -.4549E-01
                        .2443        -.1026
                        .2618        -.1385
                        .2793        -.1801
                        .2967        -.2328
                        .3142        -.3030
                        .3491        -.5268
                        .3840        -.6709
                        .4189        -.7462
                  </tableData>
               </table>
            </product>
         </function>

         <function name="aero/coefficient/Cmq">
            <description>
               Pitch moment coefficient due to pitch rate(per radian)
                Pitch Damping Derivative
               Very important to Short Period damping of oscillations
            </description>
            <product>
               <property>aero/qbar-psf</property>
               <property>metrics/Sw-sqft</property>
               <property>metrics/cbarw-ft</property>
               <property>aero/ci2vel</property>
               <property>velocities/q-aero-rad_sec</property>
               <table>
                  <independentVar lookup="row">aero/alpha-rad</independentVar>
                  <tableData>
                       -.2793        -11.97
                       -.1745        -11.97
                       -.1396        -11.97
                       -.1047        -11.97
                       -.6981E-01    -11.97
                       -.3491E-01    -11.97
                         .000        -11.97
                        .3491E-01    -11.97
                        .6981E-01    -11.97
                        .1396        -11.97
                        .1745        -11.97
                        .2094        -11.97
                        .2443        -11.97
                        .2618        -11.97
                        .2793        -11.97
                        .2967        -11.97
                        .3142        -11.97
                        .3491        -11.97
                        .3840        -11.97
                        .4189        -11.97
                  </tableData>
               </table>
            </product>
         </function>

         <function name="aero/coefficient/Cmadot">
            <description>
               Pitch moment coefficient due to AOA rate(per radian)
               Negitive Cmad increase Short Period damping
            </description>
            <product>
               <property>aero/qbar-psf</property>
               <property>metrics/Sw-sqft</property>
               <property>metrics/cbarw-ft</property>
               <property>aero/ci2vel</property>
               <property>aero/alphadot-rad_sec</property>
               <table>
                  <independentVar lookup="row">aero/alpha-rad</independentVar>
                  <tableData>
                       -.2793        -6.432
                       -.1745        -6.061
                       -.1396        -6.472
                       -.1047        -6.474
                       -.6981E-01    -6.414
                       -.3491E-01    -6.430
                         .000        -6.362
                        .3491E-01    -6.236
                        .6981E-01    -5.940
                        .1396        -4.506
                        .1745        -3.296
                        .2094        -2.302
                        .2443        -.9463
                        .2618         .1301
                        .2793         1.881
                        .2967         4.652
                        .3142         8.294
                        .3491         11.94
                        .3840         11.08
                        .4189         10.76
                  </tableData>
               </table>
            </product>
         </function>

         <function name="aero/coefficient/CmDe">
            <description>
               Pitch moment coefficient due to elevator deflection
               Positive surface deflection is trailing edge down
            </description>
            <product>
               <property>aero/qbar-psf</property>
               <property>metrics/Sw-sqft</property>
               <property>metrics/cbarw-ft</property>
               <table>
                  <independentVar lookup="row">fcs/elevator-pos-rad</independentVar>
                  <tableData>
                       -.3491         .2797
                       -.2618         .2372
                       -.1745         .1619
                       -.8727E-01     .8096E-01
                         .000        -.1619E-03
                        .8727E-01    -.8096E-01
                        .1745        -.1619
                        .2618        -.2372
                        .3491        -.2800
                  </tableData>
               </table>
            </product>
         </function>

         <function name="aero/coefficient/CmDf1L">
            <description>
               Pitch moment coefficient due to left Plain Flaps Deflection
               Positive surface deflection is trailing edge down
               Ultimately, we will feed this left flap pos
            </description>
            <product>
               <property>aero/qbar-psf</property>
               <property>metrics/Sw-sqft</property>
               <property>metrics/cbarw-ft</property>
               <table>
                  <independentVar lookup="row">fcs/flap-pos-deg</independentVar>
                  <tableData>
                         .000          .000
                        5.000        -.8015E-02
                        15.00        -.2213E-01
                        25.00        -.3372E-01
                        35.00        -.3922E-01
                  </tableData>
               </table>
            </product>
         </function>

         <function name="aero/coefficient/CmDf1R">
            <description>
               Pitch moment coefficient due to right Plain Flaps Deflection
               Positive surface deflection is trailing edge down
               Ultimately, we will feed this right flap pos
            </description>
            <product>
               <property>aero/qbar-psf</property>
               <property>metrics/Sw-sqft</property>
               <property>metrics/cbarw-ft</property>
               <table>
                  <independentVar lookup="row">fcs/flap-pos-deg</independentVar>
                  <tableData>
                         .000          .000
                        5.000        -.8015E-02
                        15.00        -.2213E-01
                        25.00        -.3372E-01
                        35.00        -.3922E-01
                  </tableData>
               </table>
            </product>
         </function>

         <function name="aero/coefficient/CmDf11L">
            <description>
               Pitch moment coefficient due to left Plain Flaps Deflection
               Positive surface deflection is trailing edge down
               Ultimately, we will feed this left flap pos
            </description>
            <product>
               <property>aero/qbar-psf</property>
               <property>metrics/Sw-sqft</property>
               <property>metrics/cbarw-ft</property>
               <table>
                  <independentVar lookup="row">fcs/flap-pos-deg</independentVar>
                  <tableData>
                       -20.00        -.1398
                       -15.00        -.1186
                       -10.00        -.8096E-01
                       -5.000        -.4048E-01
                         .000          .000
                        5.000         .4048E-01
                        10.00         .8096E-01
                        15.00         .1186
                        20.00         .1400
                  </tableData>
               </table>
            </product>
         </function>

         <function name="aero/coefficient/CmDf11R">
            <description>
               Pitch moment coefficient due to right Plain Flaps Deflection
               Positive surface deflection is trailing edge down
               Ultimately, we will feed this right flap pos
            </description>
            <product>
               <property>aero/qbar-psf</property>
               <property>metrics/Sw-sqft</property>
               <property>metrics/cbarw-ft</property>
               <table>
                  <independentVar lookup="row">fcs/flap-pos-deg</independentVar>
                  <tableData>
                       -20.00        -.1398
                       -15.00        -.1186
                       -10.00        -.8096E-01
                       -5.000        -.4048E-01
                         .000          .000
                        5.000         .4048E-01
                        10.00         .8096E-01
                        15.00         .1186
                        20.00         .1400
                  </tableData>
               </table>
            </product>
         </function>

     </axis>


<!-- ********************************************************************** -->


     <axis name="YAW">


         <function name="aero/coefficient/Cnb">
            <description>
               Yaw moment coefficient due to sideslip(per radian)
               Determines Dutch Roll and Spiral characteristics
               Prevents side-slip and yawing moments
            </description>
            <product>
               <property>aero/qbar-psf</property>
               <property>metrics/Sw-sqft</property>
               <property>metrics/bw-ft</property>
               <sin><property>aero/beta-rad</property></sin>
               <table>
                  <independentVar lookup="row">aero/alpha-rad</independentVar>
                  <tableData>
                       -.2793         .4953E-01
                       -.1745         .4953E-01
                       -.1396         .4953E-01
                       -.1047         .4953E-01
                       -.6981E-01     .4953E-01
                       -.3491E-01     .4953E-01
                         .000         .4953E-01
                        .3491E-01     .4953E-01
                        .6981E-01     .4953E-01
                        .1396         .4953E-01
                        .1745         .4953E-01
                        .2094         .4953E-01
                        .2443         .4953E-01
                        .2618         .4953E-01
                        .2793         .4953E-01
                        .2967         .4953E-01
                        .3142         .4953E-01
                        .3491         .4953E-01
                        .3840         .4953E-01
                        .4189         .4953E-01
                  </tableData>
               </table>
            </product>
         </function>

         <function name="aero/coefficient/Cnp">
            <description>
               Yaw moment coefficient due to roll rate(per radian)
               Reduces Dutch Roll damping
               positive value desireable
            </description>
            <product>
               <property>aero/qbar-psf</property>
               <property>metrics/Sw-sqft</property>
               <property>metrics/bw-ft</property>
               <property>aero/bi2vel</property>
               <property>velocities/p-aero-rad_sec</property>
               <table>
                  <independentVar lookup="row">aero/alpha-rad</independentVar>
                  <tableData>
                       -.2793         .6614E-01
                       -.1745         .3087E-01
                       -.1396         .1923E-01
                       -.1047         .7628E-02
                       -.6981E-01    -.4035E-02
                       -.3491E-01    -.1579E-01
                         .000        -.2759E-01
                        .3491E-01    -.3952E-01
                        .6981E-01    -.5224E-01
                        .1396        -.8667E-01
                        .1745        -.1050
                        .2094        -.1226
                        .2443        -.1384
                        .2618        -.1485
                        .2793        -.1539
                        .2967        -.6925E-01
                        .3142        -.2339
                        .3491        -.1589
                        .3840        -.4800E-01
                        .4189         .8690E-02
                  </tableData>
               </table>
            </product>
         </function>

         <function name="aero/coefficient/Cnr">
            <description>
               Yaw Moment coefficient due to yaw rate(per radian)
               Main contributor to damping of Dutch Roll
            </description>
            <product>
               <property>aero/qbar-psf</property>
               <property>metrics/Sw-sqft</property>
               <property>metrics/bw-ft</property>
               <property>aero/bi2vel</property>
               <property>velocities/r-aero-rad_sec</property>
               <table>
                  <independentVar lookup="row">aero/alpha-rad</independentVar>
                  <tableData>
                       -.2793        -.8735E-01
                       -.1745        -.7960E-01
                       -.1396        -.7902E-01
                       -.1047        -.7928E-01
                       -.6981E-01    -.8032E-01
                       -.3491E-01    -.8224E-01
                         .000        -.8518E-01
                        .3491E-01    -.8925E-01
                        .6981E-01    -.9452E-01
                        .1396        -.1080
                        .1745        -.1135
                        .2094        -.1177
                        .2443        -.1199
                        .2618        -.1201
                        .2793        -.1184
                        .2967        -.1148
                        .3142        -.1081
                        .3491        -.7958E-01
                        .3840        -.6997E-01
                        .4189        -.7020E-01
                  </tableData>
               </table>
            </product>
         </function>

         <function name="aero/coefficient/CnDf1">
            <description>
               Yaw Moment Coefficient due to Asymetrical Plain Flaps Deflection
               calculated as difference between left and right flap drag coef,
               times distance from centerline to MAC of surface.
            </description>
            <product>
               <value>      5.77</value>
               <difference>
                  <property>aero/coefficient/CdDf1R</property>
                  <property>aero/coefficient/CdDf1L</property>
               </difference>
            </product>
         </function>

         <function name="aero/coefficient/CnDf11">
            <description>
               Yaw Moment Coefficient due to Asymetrical Plain Flaps Deflection
               calculated as difference between left and right flap drag coef,
               times distance from centerline to MAC of surface.
            </description>
            <product>
               <value>      1.24</value>
               <difference>
                  <property>aero/coefficient/CdDf11R</property>
                  <property>aero/coefficient/CdDf11L</property>
               </difference>
            </product>
         </function>

         <function name="aero/coefficient/CnDa">
            <description>
               Yaw Moment coefficient due to plain flap aileron deflection
            </description>
            <product>
               <property>aero/qbar-psf</property>
               <property>metrics/Sw-sqft</property>
               <property>metrics/bw-ft</property>
               <table>
                  <independentVar lookup="row">aero/alpha-rad</independentVar>
                  <independentVar lookup="column">fcs/left-aileron-pos-rad                </independentVar>
                  <tableData>
                                     -.6458        -.4014        -.1571        -.7854E-01      .000         .7854E-01     .1571         .4014         .6458
                       -.2793        -.5197E-02    -.3847E-02    -.1527E-02    -.7634E-03      .000         .7634E-03     .1527E-02     .3847E-02     .5197E-02
                       -.1745        -.1954E-02    -.1447E-02    -.5742E-03    -.2871E-03      .000         .2871E-03     .5742E-03     .1447E-02     .1954E-02
                       -.1396        -.9308E-03    -.6891E-03    -.2735E-03    -.1367E-03      .000         .1367E-03     .2735E-03     .6891E-03     .9308E-03
                       -.1047         .4812E-04     .3562E-04     .1414E-04     .7068E-05      .000        -.7068E-05    -.1414E-04    -.3562E-04    -.4812E-04
                       -.6981E-01     .1037E-02     .7679E-03     .3047E-03     .1524E-03      .000        -.1524E-03    -.3047E-03    -.7679E-03    -.1037E-02
                       -.3491E-01     .2081E-02     .1540E-02     .6112E-03     .3056E-03      .000        -.3056E-03    -.6112E-03    -.1540E-02    -.2081E-02
                         .000         .3169E-02     .2346E-02     .9311E-03     .4655E-03      .000        -.4655E-03    -.9311E-03    -.2346E-02    -.3169E-02
                        .3491E-01     .4294E-02     .3179E-02     .1262E-02     .6308E-03      .000        -.6308E-03    -.1262E-02    -.3179E-02    -.4294E-02
                        .6981E-01     .5445E-02     .4031E-02     .1600E-02     .7998E-03      .000        -.7998E-03    -.1600E-02    -.4031E-02    -.5445E-02
                        .1396         .7690E-02     .5693E-02     .2259E-02     .1130E-02      .000        -.1130E-02    -.2259E-02    -.5693E-02    -.7690E-02
                        .1745         .8486E-02     .6282E-02     .2493E-02     .1247E-02      .000        -.1247E-02    -.2493E-02    -.6282E-02    -.8486E-02
                        .2094         .9086E-02     .6727E-02     .2669E-02     .1335E-02      .000        -.1335E-02    -.2669E-02    -.6727E-02    -.9086E-02
                        .2443         .9454E-02     .6999E-02     .2777E-02     .1389E-02      .000        -.1389E-02    -.2777E-02    -.6999E-02    -.9454E-02
                        .2618         .9539E-02     .7062E-02     .2802E-02     .1401E-02      .000        -.1401E-02    -.2802E-02    -.7062E-02    -.9539E-02
                        .2793         .9428E-02     .6979E-02     .2770E-02     .1385E-02      .000        -.1385E-02    -.2770E-02    -.6979E-02    -.9428E-02
                        .2967         .9112E-02     .6746E-02     .2677E-02     .1339E-02      .000        -.1339E-02    -.2677E-02    -.6746E-02    -.9112E-02
                        .3142         .8435E-02     .6244E-02     .2478E-02     .1239E-02      .000        -.1239E-02    -.2478E-02    -.6244E-02    -.8435E-02
                        .3491         .4054E-02     .3001E-02     .1191E-02     .5955E-03      .000        -.5955E-03    -.1191E-02    -.3001E-02    -.4054E-02
                        .3840         .7345E-03     .5438E-03     .2158E-03     .1079E-03      .000        -.1079E-03    -.2158E-03    -.5438E-03    -.7345E-03
                        .4189        -.2214E-02    -.1639E-02    -.6504E-03    -.3252E-03      .000         .3252E-03     .6504E-03     .1639E-02     .2214E-02
                  </tableData>
               </table>
            </product>
         </function>


         <!-- ******************************************************
              CnDr is not calculated by DATCOM+, but a default value
              is supplied
              ******************************************************-->

         <function name="aero/coefficient/CnDr">
            <description>
               Yaw Coefficient due to rudder(DATCOM does not calculate)
               High value for controllablity, low value
               for good dynamic stability
            </description>
            <product>
               <property>aero/qbar-psf</property>
               <property>metrics/Sw-sqft</property>
               <property>metrics/bw-ft</property>
               <property>fcs/rudder-pos-rad</property>
               <value>  -.6000E-01</value>
            </product>
         </function>


     </axis>


<!-- ********************************************************************** -->


      <function name="aero/elev_hinge_moment_ft_lbs">
         <description>
            Elevator hinge moment in ft-lbs
            HM = q * S * Cbar * ( Ch0 + Cha*alpha + Chd*delta )
            Positive causes trailing edge down movement
            Ch0 is used to artifically trim HM to zero
         </description>
         <product>
               <property>aero/qbar-psf</property>
               <property>metrics/Sw-sqft</property>
            <value>   1.434    </value>	<!-- surface area of elevator -->
            <value>   .3937    </value>	<!-- MAC of elevator -->
            <sum>
 <!--
               <property>aero/Ch0_elev</property>
 -->
               <product>
                  <property>aero/alpha-rad</property>
                  <table>                            	<!-- Ch-alpha -->
                     <independentVar lookup="row">
                     aero/alpha-rad</independentVar>
                     <tableData>
                          -.2793    	   .5018E-03
                          -.1745    	   .5018E-03
                          -.1396    	   .5018E-03
                          -.1047    	   .5018E-03
                          -.6981E-01	   .5018E-03
                          -.3491E-01	   .5018E-03
                            .000    	   .5018E-03
                           .3491E-01	   .5018E-03
                           .6981E-01	   .5018E-03
                           .1396    	   .5018E-03
                           .1745    	   .4827E-02
                           .2094    	   .4801E-02
                           .2443    	   .4795E-02
                           .2618    	   .4795E-02
                           .2793    	   .4795E-02
                           .2967    	   .4795E-02
                           .3142    	   .4795E-02
                           .3491    	   .4801E-02
                           .3840    	   .4827E-02
                           .4189    	   .4795E-02
                     </tableData>
                  </table>
               </product>
               <product>
                  <property>fcs/elevator-pos-rad</property>
                  <table>                            	<!-- Ch-delta elevator -->
                     <independentVar lookup="row">
                     fcs/elevator-pos-rad</independentVar>
                     <tableData>
                          -.3491    	   .4827E-02
                          -.2618    	   .4801E-02
                          -.1745    	   .4795E-02
                          -.8727E-01	   .4795E-02
                            .000    	   .4795E-02
                           .8727E-01	   .4795E-02
                           .1745    	   .4795E-02
                           .2618    	   .4801E-02
                           .3491    	   .4827E-02
                     </tableData>
                  </table>
               </product>
            </sum>
         </product>
      </function>

   </aerodynamics>
